/BATCH
/NOPR
/COM, ICEM-ANSYS INTERFACE - Version 13.1 -
/CONFIG,NPROC,1
/PREP7
ET,1,185,,0,,0,,0,0
ET,2,181,,,0,,,,0
ET,3,181,,,0,,,,0
ET,4,181,,,0,,,,0
ET,5,4,,0,,,,0,0
/NOLIST
NBLOCK ,6,SOLID
(3i8,6e16.9)
       1       0       0 2.471209615E-01 8.055977821E-01 3.826512098E-01
       2       0       0 2.486354411E-01 1.022455692E+00 3.835256100E-01
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N ,R5.3,LOC,     -1
SHPP,WARN
EBLOCK ,19,SOLID
(19i10)
         5         1         0         0         0         0         0         0         8         0      1289       648        39      1447      1447       235       235       235       235
         5         1         0         0         0         0         0         0         8         0      1290      1571      1320       842       842      1325      1325      1325      1325
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
-1
EN ,R5.5,ATTR,     -1
EBLOCK ,19,SOLID
(19i10)
         1         2         0         0         0         0         0         0         4         0         1      1589       175       401       401
         1         2         0         0         0         0         0         0         4         0         2      1589        44        61        61
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
-1
EN ,R5.5,ATTR,     -1
EBLOCK ,19,SOLID
(19i10)
         2         3         0         0         0         0         0         0         4         0         6      1587       291       601       601
         2         3         0         0         0         0         0         0         4         0         9      1585       457       483       483
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
-1
EN ,R5.5,ATTR,     -1
EBLOCK ,19,SOLID
(19i10)
         3         4         0         0         0         0         0         0         4         0         7      1586       381       385       385
         3         4         0         0         0         0         0         0         4         0         8      1586       398       120       120
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
-1
EN ,R5.5,ATTR,     -1
EBLOCK ,19,SOLID
(19i10)
         4         5         0         0         0         0         0         0         2         0      8501      1587        28
         4         5         0         0         0         0         0         0         2         0      8502      1573       159
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
-1
EN ,R5.5,ATTR,     -1
CMBLOCK,WALLL,NODE,589
(8i10)
         1         2         3         4         5         6         7         8
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CMBLOCK,INLET,NODE,53
(8i10)
        14        25        26        27        28        29       143       145
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CMBLOCK,OUTLET,NODE,52
(8i10)
         6         7         8        17        18        41        48       112
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CMBLOCK,GEOM,NODE,263
(8i10)
         1         2         3         4         5         6         7         8
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CMBLOCK,FLUID,NODE,1556
(8i10)
         1         2         3         4         5         6         7         8
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/GOLIST
NSEL,ALL
ESEL,ALL
DOFSEL,ALL
CMSEL,ALL
FINISH
SAVE
/GOPR
/SOLU
